// SBML level 2 version 4

model MODEL1008060002()
  // Munz2009 - Zombie SIZRQ
  // This is the model with latent infection and quarantine described in the article.
  // This model was originally created by libAntimony v1.4 (using libSBML 3.4.1).
  // This model is described in the article:
  // When zombies attack!: Mathematical modelling of an outbreak of zombie infection
  // P. Munz, I. Hudea, J. Imad and R.J. Smith?
  // Infectious Disease Modelling Research Progress 2009, chapter 4, pp 133-150. Editors: Jean Michel Tchuenche and C. Chiyaka; Nova Science Publishers, Inc., NY, USA.
  // Abstract:
  // Zombies are a popular figure in pop culture/entertainment and they are usually portrayed as being brought about through an outbreak or epidemic. Consequently, we model a zombie attack, using biological assumptions based on popular zombie movies. We introduce a basic model for zombie infection, determine equilibria and their stability, and illustrate the outcome with numerical solutions. We then refine the model to introduce a latent period of zombification, whereby humans are infected, but not infectious, before becoming undead. We then modify the model to include the effects of possible quarantine or a cure. Finally, we examine the impact of regular, impulsive reductions in the number of zombies and derive conditions under which eradication can occur. We show that only quick, aggressive attacks can stave off the doomsday scenario: the collapse of society as zombies overtake us all.
  // This model is hosted on BioModels Database and identified by: MODEL1008060002 .
  // To cite BioModels Database, please use: BioModels Database: An enhanced, curated and annotated resource for published quantitative kinetic models .
  // To the extent possible under law, all copyright and related or neighbouring rights to this encoded model have been dedicated to the public domain worldwide. Please refer to CC0 Public Domain Dedication for more information.
  // biomodels.db:MODEL1008060002
  // isDescribedBy ISBN:1607413477
  // hasTaxon taxonomy:9606
  // isVersionOf GO:0016032 DOID:0050117

  // Compartments:
  compartment env = 1; env is "environment";

  // Species:
  substanceOnly species S in env = N; S is "Susceptible";
  substanceOnly species I in env = 0; I is "Infected";
  substanceOnly species Z in env = 0; Z is "Zombie";
  substanceOnly species R in env = 0; R is "Removed";
  substanceOnly species Q in env = 0; Q is "Quarantined";

  // Parameters:
  N = 500 substance; N is "starting Population";
  p has indperday;
  // background death rate
  delta = 0.0001 perday;
  // rate of zombie bites
  beta = 0.0095 perdayperind;
  // quarantine rate for infected
  kappa = 0.0001 perday;
  // quarantine rate for zombies
  sigma = 0.0001 perday;
  // deathrate of quarantined
  gamma = 0.0001 perday;
  // rate of zombification
  rho = 0.05 perday;
  // rate of undead resurrection
  zeta = 0.0001 perday;
  // rate of zombie destruction
  alpha = 0.005 perdayperind;

  // Assignment rules:
  p := S*delta;

  // Reactions:
  birth: => S; p;
  death_healthy: S => R; delta*S;
  infection: S => I; beta*S*Z;  // modifiers: Z
  quarantine_infected: I => Q; kappa*I;
  quarantine_zombies: Z => Q; sigma*Z;
  death_quarantined: Q => R; gamma*Q;
  natural_death_infected: I => R; delta*I;
  zombification_infected: I => Z; rho*I;
  resurrection: R => Z; zeta*R;
  destruction: Z => R; alpha*S*Z;  // modifiers: S

  // Unit definitions:
  unit substance = 1000 item; substance is "individuals(thousands)";
  unit time = 86400 second; time is "days";
  unit perday = 1 / (86400 second); perday is "per day";
  unit perdayperind = 1 / (86400 second * 1000 item); perdayperind is "per day per thousand individuals";
  unit indperday = 1000 item / (86400 second); indperday is "thousand individuals per day";
end
