// SBML level 2 version 4
// dcterms:bibliographicCitation: urn:miriam:doi:10.1109/SECON.2015.7132968

function Constant_flux__irreversible(v)
  v;
end
Constant_flux__irreversible is "Constant flux (irreversible)";

function Human_birth_rate(Psi, N_h)
  Psi*N_h;
end

function Mosquito_birth_rate(Psi_v, N_v)
  Psi_v*N_v;
end

model Turner2015___Human_Mosquito_SEIR_SEI_Model()
  // Turner2015 - Human/Mosquito SEIR/SEI Model
  // Mathematical model of malaria transmission between humans and mosquitoes.
  // hasPart efo:0001068
  // isVersionOf ncit:C17214
  // isDescribedBy doi:10.1109/SECON.2015.7132968

  // Compartments:
  compartment Human = 1;  // isVersionOf taxonomy:9606
  compartment Mosquito = 1;  // hasProperty ncit:C14198

  // Species:
  species Susceptible_Human in Human = 500;
  species Exposed_Human in Human = 0;
  species Infected_Human in Human = 0;
  species Recovered in Human = 0;
  species Susceptible_Mosquito in Mosquito = 2500;
  species Exposed_Mosquito in Mosquito = 0;
  species Infected_Mosquito in Mosquito = 0;

  // Parameters:
  Human_Capital_lambda = 0.03285;  // encodes ncit:C85498
  Human_psi = 7.666e-5;  // encodes efo:0004804
  Human_sigma = 18;
  Human_B_hv = 0.02;  // encodes ncit:C17214
  Human_v_h = 0.08333;
  Human_gamma = 0.003704;  // encodes ncit:C25746
  Human_delta = 0.0003454;  // encodes GO:0016265
  Human_rho = 0.0146;  // encodes ncit:C16505
  Human_u1 = 1.6e-5;  // encodes GO:0016265
  Human_u2 = 3e-7;  // encodes GO:0016265
  var Human_b_N_h_N_v; Human_b_N_h_N_v is "Human_b(N_h,N_v)";  // encodes efo:0004804
  Vector_psi = 80;
  Vector_sigma = 0.6;
  Vector_B_vh = 0.02;
  Vector_B_tilde_vh = 0.833;
  Vector_v = 0.1;
  Vector_u1 = 0.1429;  // encodes GO:0016265
  Vector_u2 = 2.279e-6;  // encodes GO:0016265
  var Vector_b_N_h_N_v; Vector_b_N_h_N_v is "Vector_b(N_h,N_v)";  // encodes efo:0004804

  // Assignment rules:
  Human_total_Pop_N_h := Susceptible_Human + Exposed_Human + Infected_Human + Recovered;
  Human_f_h := Human_u1 + Human_u2*Human_total_Pop_N_h;
  Mosquito_tot_pop_N_v := Susceptible_Mosquito + Exposed_Mosquito + Infected_Mosquito;
  Human_b_N_h_N_v := Vector_sigma*Mosquito_tot_pop_N_v*Human_sigma/(Human_sigma*Human_total_Pop_N_h + Vector_sigma*Mosquito_tot_pop_N_v);
  Human_lambda := Human_b_N_h_N_v*Human_B_hv*(Infected_Mosquito/Mosquito_tot_pop_N_v);
  Vector_b_N_h_N_v := Vector_sigma*Human_total_Pop_N_h*Human_sigma/(Vector_sigma*Mosquito_tot_pop_N_v + Human_sigma*Human_total_Pop_N_h);
  Vector_lambda := Vector_b_N_h_N_v*(Vector_B_vh*(Infected_Human/Human_total_Pop_N_h) + Vector_B_tilde_vh*(Recovered/Human_total_Pop_N_h));
  Mosquito_f_v := Vector_u1 + Vector_u2*Mosquito_tot_pop_N_v;

  // Reactions:
  Immigration: => Susceptible_Human; Human*Constant_flux__irreversible(Human_Capital_lambda);
  Birth: => Susceptible_Human; Human*Human_birth_rate(Human_psi, Human_total_Pop_N_h);
  Loss_of_Immunity: Recovered => Susceptible_Human; Human*Human_rho*Recovered;
  Infection: Susceptible_Human => Exposed_Human; Human*Human_lambda*Susceptible_Human;
  Susceptible_natural_death: Susceptible_Human => ; Human*Human_f_h*Susceptible_Human;
  Disease_progression: Exposed_Human => Infected_Human; Human*Human_v_h*Exposed_Human;
  Exposed_natural_death: Exposed_Human => ; Human*Human_f_h*Exposed_Human;
  Recovery: Infected_Human => Recovered; Human*Human_gamma*Infected_Human;
  Infected_natural_death: Infected_Human => ; Human*Human_f_h*Infected_Human;
  Infected_disease_induced_death: Infected_Human => ; Human*Human_delta*Infected_Human; Infected_disease_induced_death is "Infected disease-induced death";
  Recovered_natural_death: Recovered => ; Human*Human_f_h*Recovered;
  Mosquito_birth: => Susceptible_Mosquito; Mosquito*Mosquito_birth_rate(Vector_psi, Mosquito_tot_pop_N_v);
  Mosquito_exposed: Susceptible_Mosquito => Exposed_Mosquito; Mosquito*Vector_lambda*Susceptible_Mosquito;
  Mosquito_susceptible_death: Susceptible_Mosquito => ; Mosquito*Mosquito_f_v*Susceptible_Mosquito;
  Mosquito_disease_progression: Exposed_Mosquito => Infected_Mosquito; Mosquito*Vector_v*Exposed_Mosquito;
  Mosquito_exposed_death: Exposed_Mosquito => ; Mosquito*Mosquito_f_v*Exposed_Mosquito;
  Mosquito_infected_death: Infected_Mosquito => ; Mosquito*Mosquito_f_v*Infected_Mosquito;

  // Unit definitions:
  unit volume = 1e-3 litre;
  unit time = 86400 second;
  unit substance = 1e-3 mole;
end
