// SBML level 2 version 4
// dcterms:bibliographicCitation: urn:miriam:pubmed:19364156

model Mukandavire2009___Model_for_HIV_Malaria_co_infection()
  // Mukandavire2009 - Model for HIV-Malaria co-infection
  // Mathematical model for HIV, malaria and HIV-malaria co-infection.
  // hasPart efo:0000764
  // hasPart efo:0001068
  // isDescribedBy pubmed:19364156

  // Compartments:
  compartment Human = 1;
  compartment Vector = 1;

  // Species:
  species $S_H in Human = 10000;
  species $E_M in Human = 150;
  species $I_M in Human = 25;
  species $I_H in Human = 5;
  species $E_H_M in Human = 3; E_H_M is "E_H,M";
  species $I_H_M in Human = 1; I_H_M is "I_H,M";
  species $A_H in Human = 0;
  species $E_A_M in Human = 0; E_A_M is "E_A,M";
  species $A_H_M in Human = 0; A_H_M is "A_H,M";
  species $S_V in Vector = 25000;
  species $E_V in Vector = 500;
  species $I_V in Vector = 50;

  // Parameters:
  Capital_lambda_H = 0.05;
  Capital_lambda_V = 6;
  u_H = 3.9e-5;
  u_V = 0.1429;
  delta_H = 0.000913;
  delta_M = 0.0003454;
  Beta_H = 0.0007;
  Beta_M = 0.8333;
  // Value: (0,1)
  Beta_V = 0.9;
  // value: (0.25,1)
  b_M = 0.25;
  eta_A = 1.4;
  eta_HM = 1.5;
  xi = 1.002;
  theta_HM = 1.002;
  sigma = 1;
  tau = 1.001;
  epsilon = 1.02;
  nu = 1.002;
  psi = 1.002;
  phi1 = 0.00556;
  phi2 = 0.002;
  phi3 = 0.0005;
  eta_v = 1.5;
  theta_V = 1.5;
  kappa = 0.000548;
  gamma_H = 0.08333;
  gamma_V = 0.1;
  New_HIV_cases = 0;
  New_Malaria_Cases = 0;
  New_Co_infection_Cases = 0; New_Co_infection_Cases is "New_Co-infection_Cases";
  Mortality_Malaria = 0;
  Mortality_HIV = 0;
  Mortality_Mixed = 0;

  // Assignment rules:
  N_H := S_H + E_M + I_M + I_H + E_H_M + I_H_M + A_H + E_A_M + A_H_M;
  N_V := S_V + E_V + I_V;
  lambda_H := Beta_H*(I_H + eta_HM*(E_H_M + theta_HM*I_M) + eta_A*(A_H + eta_HM*(E_A_M + theta_HM*A_H_M)))/N_H;
  lambda_M := Beta_M*b_M*(I_V/N_H);
  lambda_V := Beta_V*b_M*((I_M + eta_v*(I_H_M + theta_V*A_H_M))/N_H);

  // Rate rules:
  S_H' = Capital_lambda_H + phi1*I_M - lambda_H*S_H - lambda_M*S_H - u_H*S_H;
  E_M' = lambda_M*S_H - lambda_H*E_M - (gamma_H + u_H)*E_M;
  I_M' = gamma_H*E_M - sigma*lambda_H*I_M - (u_H + delta_M + phi1)*I_M;
  I_H' = lambda_H*S_H + phi2*I_H_M - nu*lambda_M*I_H - (u_H + kappa)*I_H;
  E_H_M' = lambda_H*E_M + nu*lambda_M*I_H - (epsilon*lambda_H + u_H + kappa)*E_H_M;
  I_H_M' = sigma*lambda_H*I_M + epsilon*gamma_H*E_H_M - (u_H + tau*delta_M + phi2 + xi*kappa)*I_H_M;
  A_H' = kappa*I_H + phi3*A_H_M - nu*lambda_M*A_H - (u_H + delta_H)*A_H;
  E_A_M' = nu*lambda_M*A_H + kappa*eta_HM - (epsilon*gamma_H + u_H + delta_H)*E_A_M;
  A_H_M' = xi*kappa*I_H_M + epsilon*gamma_H*E_A_M - (u_H + phi3 + tau*delta_M + psi*delta_H)*A_H_M;
  S_V' = Capital_lambda_V - lambda_V*S_V - u_V*S_V;
  E_V' = lambda_V*S_V - (gamma_V + u_V)*E_V;
  I_V' = gamma_V*E_V - u_V*I_V;
  New_HIV_cases' = lambda_H*S_H + sigma*lambda_H*I_M;
  New_Malaria_Cases' = gamma_H*E_M + epsilon*gamma_H*E_H_M;
  New_Co_infection_Cases' = sigma*lambda_H*I_M + epsilon*gamma_H*E_H_M;
  Mortality_Malaria' = delta_M*I_M + tau*delta_M*I_H_M;
  Mortality_HIV' = delta_H*A_H;
  Mortality_Mixed' = (psi*delta_H + tau*delta_M)*A_H_M;

  // Unit definitions:
  unit volume = 1e-3 litre;
  unit substance = 1e-3 mole;
end
