// SBML level 2 version 4
// dcterms:bibliographicCitation: urn:miriam:pubmed:27575466

function Constant_flux__irreversible(v)
  v;
end
Constant_flux__irreversible is "Constant flux (irreversible)";

function Immunity_wanning_rate_k1(kappa1, substrate)
  2*kappa1*substrate;
end

function Immunity_wanning_rate_k2(kappa2, substrate)
  2*kappa2*substrate;
end

function Infection_of_Susceptible_2(sigma2, lambda2, substrate)
  (1 - sigma2)*lambda2*substrate;
end

function Immune_Boosting_1(v1, lambda1, substrate)
  v1*lambda1*substrate;
end

function Infection_of_Susceptible_1(sigma1, lambda1, substrate)
  (1 - sigma1)*lambda1*substrate;
end

function Immune_Boosting_2(v2, lambda2, substrate)
  v2*lambda2*substrate;
end

model New_Model()
  // Leung2016 - SIRWS model with immune boosting and cross-immunity between two pathogens
  // biomodels.db:MODEL1808280006
  // isDescribedBy pubmed:27575466

  // Compartments:
  compartment compartment = 1;

  // Species:
  species X_SS in compartment = 0.058;
  species X_IS in compartment = 0.001;
  species X_RS in compartment = 0.41;
  species X_WS in compartment = 0.1;
  species X_SI in compartment = 0.001;
  species X_II in compartment = 0;
  species X_RI in compartment = 0;
  species X_WI in compartment = 0;
  species X_SR in compartment = 0.33;
  species X_IR in compartment = 0;
  species X_RR in compartment = 0;
  species X_WR in compartment = 0;
  species X_SW in compartment = 0.1;
  species X_IW in compartment = 0;
  species X_RW in compartment = 0;
  species X_WW in compartment = 0;

  // Parameters:
  gamma = 17;
  v = 2;
  beta = 260;
  alpha1 = 0;
  alpha2 = 0;
  sigma = 0.49;

  // Assignment rules:
  mu := 1/80;
  kappa := 1/10;
  gamma1 := gamma;
  gamma2 := gamma;
  kappa1 := kappa;
  kappa2 := kappa;
  v1 := v;
  v2 := v;
  beta1 := beta;
  beta2 := beta;
  lambda1 := beta1*(X_IS + (1 - alpha1)*(X_II + X_IR + X_IW));
  lambda2 := beta2*(X_SI + (1 - alpha2)*(X_II + X_RI + X_WI));
  sigma1 := sigma;
  sigma2 := sigma;
  X_Sdot := X_SS + X_SI + X_SR + X_SW;
  X_Idot := X_IS + X_II + X_IR + X_IW;
  X_Rdot := X_RS + X_RI + X_RR + X_RW;
  X_Wdot := X_WS + X_WI + X_WR + X_WW;

  // Reactions:
  reaction_1: => X_SS; compartment*Constant_flux__irreversible(mu);
  reaction_2: X_SS => ; compartment*mu*X_SS;
  reaction_3: X_SS => X_IS; compartment*lambda1*X_SS;
  reaction_4: X_SS => X_SI; compartment*lambda2*X_SS;
  reaction_5: X_WS => X_SS; compartment*Immunity_wanning_rate_k1(kappa1, X_WS);
  reaction_6: X_SW => X_SS; compartment*Immunity_wanning_rate_k2(kappa2, X_SW);
  reaction_7: X_IW => X_IS; compartment*Immunity_wanning_rate_k2(kappa2, X_IW);
  reaction_8: X_IS => X_II; compartment*Infection_of_Susceptible_2(sigma2, lambda2, X_IS);
  reaction_9: X_IS => X_RS; compartment*gamma1*X_IS;
  reaction_10: X_IS => ; compartment*mu*X_IS;
  reaction_11: X_RW => X_RS; compartment*Immunity_wanning_rate_k2(kappa2, X_RW);
  reaction_12: X_WS => X_RS; compartment*Immune_Boosting_1(v1, lambda1, X_WS);
  reaction_13: X_RS => X_RI; compartment*Infection_of_Susceptible_2(sigma2, lambda2, X_RS);
  reaction_14: X_RS => X_WS; compartment*Immunity_wanning_rate_k1(kappa1, X_RS);
  reaction_15: X_RS => ; compartment*mu*X_RS;
  reaction_16: X_WW => X_WS; compartment*Immunity_wanning_rate_k2(kappa2, X_WW);
  reaction_17: X_WS => X_WI; compartment*Infection_of_Susceptible_2(sigma2, lambda2, X_WS);
  reaction_18: X_WS => ; compartment*mu*X_WS;
  reaction_19: X_WI => X_SI; compartment*Immunity_wanning_rate_k1(kappa1, X_WI);
  reaction_20: X_SI => X_II; compartment*Infection_of_Susceptible_1(sigma1, lambda1, X_SI);
  reaction_21: X_SI => X_SR; compartment*gamma2*X_SI;
  reaction_22: X_SI => ; compartment*mu*X_SI;
  reaction_23: X_II => X_RI; compartment*gamma1*X_II;
  reaction_24: X_II => X_IR; compartment*gamma2*X_II;
  reaction_25: X_II => ; compartment*mu*X_II;
  reaction_26: X_WI => X_RI; compartment*Immune_Boosting_1(v1, lambda1, X_WI);
  reaction_27: X_RI => X_WI; compartment*Immunity_wanning_rate_k1(kappa1, X_RI);
  reaction_28: X_RI => X_RR; compartment*gamma2*X_RI;
  reaction_29: X_RI => ; compartment*mu*X_RI;
  reaction_30: X_WI => X_WR; compartment*gamma2*X_WI;
  reaction_31: X_WI => ; compartment*mu*X_WI;
  reaction_32: X_WR => X_SR; compartment*Immunity_wanning_rate_k1(kappa1, X_WR);
  reaction_33: X_SW => X_SR; compartment*Immune_Boosting_2(v2, lambda2, X_SW);
  reaction_34: X_SR => X_IR; compartment*Infection_of_Susceptible_1(sigma1, lambda1, X_SR);
  reaction_35: X_SR => X_SW; compartment*Immunity_wanning_rate_k2(kappa2, X_SR);
  reaction_36: X_SR => ; compartment*mu*X_SR;
  reaction_37: X_IW => X_IR; compartment*Immune_Boosting_2(v2, lambda2, X_IW);
  reaction_38: X_IR => X_IW; compartment*Immunity_wanning_rate_k2(kappa2, X_IR);
  reaction_39: X_IR => X_RR; compartment*gamma1*X_IR;
  reaction_40: X_IR => ; compartment*mu*X_IR;
  reaction_41: X_WR => X_RR; compartment*Immune_Boosting_1(v1, lambda1, X_WR);
  reaction_42: X_RW => X_RR; compartment*Immune_Boosting_2(v2, lambda2, X_RW);
  reaction_43: X_RR => X_WR; compartment*Immunity_wanning_rate_k1(kappa1, X_RR);
  reaction_44: X_RR => X_RW; compartment*Immunity_wanning_rate_k2(kappa2, X_RR);
  reaction_45: X_RR => ; compartment*mu*X_RR;
  reaction_46: X_WW => X_WR; compartment*Immune_Boosting_2(v2, lambda2, X_WW);
  reaction_47: X_WR => X_WW; compartment*Immunity_wanning_rate_k2(kappa2, X_WR);
  reaction_48: X_WR => ; compartment*mu*X_WR;
  reaction_49: X_WW => X_SW; compartment*Immunity_wanning_rate_k1(kappa1, X_WW);
  reaction_50: X_SW => X_IW; compartment*Infection_of_Susceptible_1(sigma1, lambda1, X_SW);
  reaction_51: X_SW => ; compartment*mu*X_SW;
  reaction_52: X_IW => X_RW; compartment*gamma1*X_IW;
  reaction_53: X_IW => ; compartment*mu*X_IW;
  reaction_54: X_WW => X_RW; compartment*Immune_Boosting_1(v1, lambda1, X_WW);
  reaction_55: X_RW => X_WW; compartment*Immunity_wanning_rate_k1(kappa1, X_RW);
  reaction_56: X_RW => ; compartment*mu*X_RW;
  reaction_57: X_WW => ; compartment*mu*X_WW;

  // Unit definitions:
  unit volume = 1e-3 litre;
  unit time = 86400 second;
  unit substance = 1e-3 mole;
end
