// SBML level 2 version 4
// dcterms:bibliographicCitation: urn:miriam:pubmed:29928725

model New_Model()
  // Qu2017 - A mumps model with seasonal fluctuations in China
  // biomodels.db:MODEL1808280011
  // isDescribedBy pubmed:29928725

  // Compartments:
  compartment compartment = 1;

  // Species:
  species $S in compartment = 370.21;
  species $V in compartment = 0.046947;
  species $E in compartment = 0.055003;
  species $I in compartment = 0.12245;
  species $L in compartment = 0.072075;
  species $H in compartment = 0.03741;
  species $R in compartment = 4.0217;
  species $N in compartment;

  // Parameters:
  LAMBDA = 53.8055;
  lambda = 0.0935;
  epsilon = 0.5082;
  Kappa = 0.0529;
  alpha = 1.9856;
  gamma = 0.371;
  rho = 0.302;
  sigma = 2.391;
  delta1 = 1.02;
  delta2 = 0.0003;
  eta = 1.8595;
  T = 3.0428;
  a1 = 10.9688;
  a2 = 274.6218;
  b1 = 0.9182;
  b2 = 300;
  c1 = 5.163;
  c2 = 19.1097;
  mu = 0.0011;
  k = 0.0529;

  // Assignment rules:
  N := S + V + E + I + L + H + R;
  beta1 := a1 + 1 + b1*sin(pi*time/T + c1);
  beta2 := a2 + 1 + b2*sin(pi*time/T + c2);

  // Rate rules:
  S' = LAMBDA - beta1*S*(I + L)/N + lambda*V - (epsilon + mu)*S;
  V' = epsilon*S - lambda*V - k*beta2*V*(I + L)/N - mu*V;
  E' = beta1*S*(I + L)/N + k*beta2*V*(I + L)/N - (alpha + mu)*E;
  I' = alpha*rho*E - (delta1 + eta)*I - mu*I;
  L' = alpha*(1 - rho)*E + eta*I - (sigma + delta2 + mu)*L;
  H' = delta2*L - (gamma + mu)*H;
  R' = delta1*I + sigma*L + gamma*H - mu*R;

  // Events:
  event: at (S < 0): S = 0;
  event_1: at (V < 0): V = 0;
  event_2: at (E < 0): E = 0;
  event_3: at (I < 0): I = 0;
  event_4: at (L < 0): L = 0;
  event_5: at (H < 0): H = 0;
  event_6: at (R < 0): R = 0;

  // Unit definitions:
  unit time = 86400 second;
end
