// SBML level 2 version 4
// dcterms:bibliographicCitation: urn:miriam:pubmed:34430043

function Rate_Law_for_R7(r2, AT, Ka, A2neg, a2pos, A2pos, mu, A2negact)
  r2*(1 - AT/Ka)*A2neg + a2pos*A2pos + mu*A2negact;
end

function Rate_Law_for_R3(r2, At, Ka, A2pos, a2, A2neg, mu, A2posact)
  r2*(1 - At/Ka)*A2pos + a2*A2neg + mu*A2posact;
end

function Rate_Law_for_R16(km0, M, C1, Km, Mact)
  km0*(M/C1) + Km*(Mact/C1);
end

function Rate_Law_for_R17(C2, pf2, I, Iact, pf1, Mact)
  1/C2*(pf2*I + pf2*Iact + pf1*Mact);
end

function Rate_Law_for_R19(px, C2, I, Iact, A2act, Mact)
  px/C2*(I + Iact + A2act + Mact);
end

function Rate_Law_for_R21(pT, Mact)
  pT*Mact;
end

function Rate_Law_for_R22(km0, M, T, kmM, Mact)
  km0*M*T + kmM*Mact*T;
end

function g(S, K)
  S/(S + K);
end

function Rate_Law_for_R24(kM0, M, V, D, C1)
  kM0*M*(V + D/C1);
end

function Rate_Law_for_R25(muM, M, kM0, T)
  muM*M + kM0*M*T;
end

function Rate_Law_for_R26(pT, Mact, muMact, Km, T)
  pT*Mact + muMact*Mact + Km*Mact*T;
end

function Rate_Law_for_R27(C1, pVact, Iact, pV, I, kM0, M, kM, Mact, V)
  1/C1*(pVact*Iact + pV*I - (kM0*M + kM*Mact*V));
end

// f(C,S;K,q)
function f(S, q, C, K)
  S/(S + q*(C/2) + K);
end

function rg(r, T, KT)
  r*T/(T + KT);
end

function Rate_Law_for_R1(alpha, A2)
  alpha*A2;
end

function Rate_Law_for_R2(muA, A1, r, T, KT)
  muA*A1 - rg(r, T, KT)*A1;
end

function Rate_Law_for_R4(r, T, KT, A2pos, a, a2, muA)
  rg(r, T, KT)*A2pos + (a + a2 + muA)*A2pos;
end

function Rate_Law_for_R5(alpha, F, q, A, Kf, Substrate)
  alpha*f(F, q, A, Kf)*Substrate;
end

function Rate_Law_for_R6(beta, V, qV, C1, A2pos, Kv)
  beta*f(V, qV/C1, A2pos, Kv)*A2pos;
end

function Rate_Law_for_R8(a, a2neg, muA, A2neg, r, T, Kt)
  (a + a2neg + muA)*A2neg + rg(r, T, Kt)*A2neg;
end

function Rate_Law_for_R9(alpha, F, q, A, Kf, A2neg)
  alpha*f(F, q, A, Kf)*A2neg;
end

function Rate_Law_for_R10(u, muA, a, A2posact, r, T, KT)
  (u + muA + a)*A2posact + rg(r, T, KT)*A2posact;
end

function Rate_Law_for_R12(I, mu1, muA, r, T, Kt)
  (mu1 + muA)*I + rg(r, T, Kt)*I;
end

function Rate_Law_for_R13(alpha, F, q, A, Kf, I)
  alpha*f(F, q, A, Kf)*I;
end

function Rate_Law_for_R14(mu1, muA, Iact, r, T, Kt)
  (mu1 + muA)*Iact + rg(r, T, Kt)*Iact;
end

function Rate_Law_for_R15(mu1, muA, I, Iact, r, T, Kt)
  (mu1 + muA)*(I + Iact) + rg(r, T, Kt)*(I + Iact);
end

function Rate_Law_for_R23(rM, ractM, X, Kx)
  rM + ractM*g(X, Kx);
end

model Leander2021___innate_immune_response_to_SARS_CoV_2_in_the_alveolar_epithelium()
  // Leander2021 - innate immune response to SARS-CoV-2 in the alveolar epithelium
  // A mathematical ODE based model of the innate immune response to SARS-CoV-2 in the alveolar epithelium.
  // occursIn BTO:0003511
  // hasTaxon taxonomy:9606
  // isDescribedBy pubmed:34430043
  // hasProperty EFO:0007224 ncit:C3439 mamo:MAMO_0000046

  // Compartments:
  compartment compartment = 1;

  // Species:
  // type I alveolar cells
  species A1 in compartment = 1.96e10;
  // susceptible (ACE2-positive) type II alveolar cells
  species A2 in compartment = 1645000000; A2 is "A2+";
  // ACE2-positive type II alveolar cells that are stimulated by interferons
  species A2_act in compartment = 0; A2_act is "A2+act";
  // infectious type II alveolar cells
  species I in compartment = 0;
  // total type II alveolar cells
  species $A2_0 in compartment;
  // immune (ACE2-negative) type II alveolar cells
  species A2_1 in compartment = 3.1255e10; A2_1 is "A2-";
  // ACE2-negative type II alveolar cells that are stimulated by interferons
  species A2_act_0 in compartment = 0; A2_act_0 is "A2-act";
  // infectious type II alveolar cells stimulated by interferons
  species I_act in compartment = 0;
  // apoptotic alveolar cells
  species D in compartment = 0;
  // concentration of interferons
  species F in compartment = 0;
  // concentration of chemokines
  species X in compartment = 0;
  // concentration of toxins
  species T in compartment = 0;
  // inactivated innate immune cells
  species M in compartment = 5.99e9;
  // activated innate immune cells
  species M_act in compartment = 0;
  // concentration of free virus
  species V in compartment = 200;
  // total concentration of alveolar cells (in pM) that are not yet treated by interferons
  species $A in compartment;
  species $AT in compartment;
  species $A2act in compartment;

  // Parameters:
  C1 = 20;
  C2 = 0.25;
  muA = 0.00035;
  muM = 0.0005;
  mu_M = 0.02; mu_M is "mu+M";
  r2 = 0.055;
  gamma = 7.73;
  theta = 0.006;
  Ka1 = 20320;
  p = 0.05; p is "p+";
  a2 = 0.0005; a2 is "a2+";
  a2_0 = 2.8e-5; a2_0 is "a2-";
  KA = 53000;
  rM = 3;
  rM_0 = 350; rM_0 is "rM+";
  beta = 0.16666;
  Kv = 1000;
  qv = 1;
  muV = 0.3333;
  pV = 3.18;
  pV_0 = 0.0318; pV_0 is "pV+";
  u = 0.005;
  mu1 = 0.013888;
  kM0 = 0.0001;
  kM = 0.0003;
  pX = 0.006;
  Kx = 500;
  pf1 = 0.01;
  pf2 = 0;
  muF = 0.35;
  alpha = 0.6;
  Kf = 100;
  qF = 40;
  pT = 0.12;
  r = 0.1;
  Kt = 300;
  muX = 1;
  muT = 0.29;
  T0 = 5;
  q = 0;

  // Assignment rules:
  A2_0 := A2 + A2_act + A2_1 + A2_act_0;
  A := (A2 + A2_1 + A1 + I)/C1*0.01/6.02;
  AT := A1 + A2 + A2_1 + A2_act + A2_act_0 + I + I_act;
  A2act := A2_act_0 + A2_act;

  // Reactions:
  R1: => A1; compartment*Rate_Law_for_R1(alpha, A2_0);  // modifiers: A2_0
  R2: A1 => ; compartment*Rate_Law_for_R2(muA, A1, r, T, Kt);  // modifiers: T
  R3: => A2; compartment*Rate_Law_for_R3(r2, AT, KA, A2, a2_0, A2_1, u, A2_act);  // modifiers: AT, A2_1, A2_act
  R10: A2_act => ; compartment*Rate_Law_for_R10(u, muA, alpha, A2_act, r, T, Kt);  // modifiers: T
  R11: A2_act_0 => ; compartment*Rate_Law_for_R10(u, muA, alpha, A2_act_0, r, T, Kt);  // modifiers: T
  R12: I => ; compartment*Rate_Law_for_R12(I, mu1, muA, r, T, Kt);  // modifiers: T
  R13: I => I_act; compartment*Rate_Law_for_R13(alpha, F, qF, A, Kf, I);  // modifiers: F, A
  R14: I_act => ; compartment*Rate_Law_for_R14(mu1, muA, I_act, r, T, Kt);  // modifiers: T
  R15: => D; compartment*Rate_Law_for_R15(mu1, muA, I, I_act, r, T, Kf);  // modifiers: I, I_act, T
  R16: D => ; compartment*Rate_Law_for_R16(kM0, M, C1, kM, M_act);  // modifiers: M, M_act
  R17: => F; compartment*Rate_Law_for_R17(C2, pf2, I, I_act, pf1, M_act);  // modifiers: I, I_act, M_act
  R4: A2 => ; compartment*Rate_Law_for_R4(r, T, Kt, A2, alpha, a2, muA);  // modifiers: T
  R5: A2 => A2_act; compartment*Rate_Law_for_R5(alpha, F, qF, A, Kf, A2);  // modifiers: F, A
  R6: A2 => I; compartment*Rate_Law_for_R6(beta, V, qv, C1, A2, Kv);  // modifiers: V
  R7: => A2_1; compartment*Rate_Law_for_R7(r2, AT, KA, A2_1, a2, A2, u, A2_act_0);  // modifiers: AT, A2, A2_act_0
  R8: A2_1 => ; compartment*Rate_Law_for_R8(alpha, a2_0, muA, A2_1, r, T, Kt);  // modifiers: T
  R9: A2_1 => A2_act_0; compartment*Rate_Law_for_R9(alpha, F, q, A, Kf, A2_1);  // modifiers: F, A
  R18: F => ; compartment*muF*F;
  R19: => X; compartment*Rate_Law_for_R19(pX, C2, I, I_act, A2act, M_act);  // modifiers: I, I_act, A2act, M_act
  R20: X => ; compartment*muX*X;
  R21: => T; compartment*Rate_Law_for_R21(pT, M_act);  // modifiers: M_act
  R22: T => ; compartment*Rate_Law_for_R22(kM0, M, T, kM, M_act);  // modifiers: M, M_act
  R23: => M; compartment*Rate_Law_for_R23(rM, rM_0, X, Kx);  // modifiers: X
  R24: M => M_act; compartment*Rate_Law_for_R24(kM0, M, V, D, C1);  // modifiers: V, D
  R25: M => ; compartment*Rate_Law_for_R25(muM, M, kM0, T);  // modifiers: T
  R26: M_act => ; compartment*Rate_Law_for_R26(pT, M_act, mu_M, kM, T);  // modifiers: T
  R27: => V; compartment*Rate_Law_for_R27(C1, pV_0, I_act, pV, I, kM0, M, kM, M_act, V);  // modifiers: I_act, I, M, M_act
  R28: V => ; compartment*muV*V;

  // Unit definitions:
  unit length = metre;
  unit area = metre^2;
  unit volume = litre;
  unit time = 86400 second;
  unit substance = 1e-12 mole;
end
